вариант := 10
# [Excel component]
    tab1 := excel["A2:E17"]
get_tab1(вариант) :=
    row ← 0
    while rows(tab1)
        if вариант == tab1[row, 0]
            break
        row ← row + 1
    γ_Н ← tab1[row, 1]
    H_H ← tab1[row, 2]
    V_H ← tab1[row, 3]
    θ_H ← tab1[row, 4]
    return [γ_Н, H_H, V_H, θ_H]
[γ_Н, H_H, V_H, θ_H] := get_tab1(вариант)
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γ_Н = 0.0605  # рад
H_H = 200  # км
V_H = 6.685  # км/c
θ_H = 0.455  # рад
# Для упрощения расчётов заранее вычислим некоторые константы
R_З := 6371  # км  # радиус Земли
r_H := R_З + H_H = 6571  # км  # радиус-вектор до точки H
K := 3.986*10^14  # м^3/с^2
# переведём метры в километры
K := K*10^-9 = 398600  # км^3/с^2
C_1 := r_H*V_H*cos(θ_H) = 39458  # Интеграл площадей
C_2 := V_H^2 - 2*K/r_H = -76.6317  # Интеграл энергии
æ_H := r_H*V_H^2/K = 0.736711  # безразмерное отношение удвоенной кинетической энергии к потенциальной энергии в начале пассивного участка
p := C_1^2/K = 3906.01  # фокальный параметр конического сечения
# или
p := æ_H*r_H*cos(θ_H)^2 = 3906.01
e := sqrt(1 + C_2*C_1^2/K^2) = 0.49906  # эксцентриситет
# 1) Элементы вершины траектории
θ_S := 0
φ_S := acos((1 - p/r_H)/e) = 0.622086  # рад
φ_S = 35.6429°
r_S := p/(1 - e) = 7797.36  # км
L_S := R_З*(γ_Н + φ_S) = 4348.76  # км  # - расстояние от точки старта до вершины траектории по поверхности Земли;
H_S := r_S - R_З = 1426.36  # км
x_H := -acos((1 - æ_H)/e) = -1.01506  # минус, так как восходящая ветвь траектории
t_S := p/(1 - e^2)*sqrt(p/K)*(tan(θ_H) - x_H/sqrt(1 - e^2)) = 855.046  # с
V_S := sqrt(V_H^2 + 2*K*(1/r_S - 1/r_H)) = 5.06044  # км/с
# 2) Элементы траектории при входе в плотные слои атмосферы (т. А)
H_A := 100  # км
r_A := R_З + H_A = 6471  # км
# Из уравнения траектории можно найти угол φ в любой точке траектории
r == p/(1 - e*cos(φ_S - φ))
cos(φ_S - φ) == 1/e*(1 - p/r)
φ_S - φ == arccos(1/e*(1 - p/r))
# Тогда может быть два решения
φ_1 == φ_S - arccos(1/e*(1 - p/r))
φ_2 == φ_S + arccos(1/e*(1 - p/r))
# В данном случаем возьмём второй корень, так как φ_A по умолчанию должен быть больше φ_S
φ_A := φ_S + acos(1/e*(1 - p/r_A)) = 1.2751  # рад
φ_A = 73.0577°
L_A := R_З*(γ_Н + φ_A) = 8509.09  # км
V_A := sqrt(V_H^2 + 2*K*(1/r_A - 1/r_H)) = 6.82379  # км/с
æ_A := r_A*V_A^2/K = 0.755936  # или
æ_A := 2 - (1 - e^2)/p*r_A = 0.755936
θ_A := -acos(sqrt(p/(æ_A*r_A))) = -0.465515  # рад
θ_A = -26.672°  # минус так как на нисходящей ветви
t_A := p/(1 - e^2)*sqrt(p/K)*((acos((1 - æ_A)/e) + acos((1 - æ_H)/e))/sqrt(1 - e^2) + tan(θ_H) - tan(θ_A)) = 1743.42  # c
t_A/60 = 29.057
# 3) Элементы траектории в точке падения (т. C)
H_C := 0  # км
r_C := R_З + H_C = 6371  # км
φ_C := φ_S + acos(1/e*(1 - p/r_C)) = 1.30574  # рад
φ_C = 74.8131°
L_C := R_З*(γ_Н + φ_C) = 8704.28  # км
V_C := sqrt(V_H^2 + 2*K*(1/r_C - 1/r_H)) = 6.96403  # км/с
æ_C := r_C*V_C^2/K = 0.775161  # или
æ_C := 2 - (1 - e^2)/p*r_C = 0.775161
θ_C := -acos(sqrt(p/(æ_C*r_C))) = -0.4749  # рад
θ_C = -27.2098°  # минус так как на нисходящей ветви
t_C := p/(1 - e^2)*sqrt(p/K)*((acos((1 - æ_C)/e) + acos((1 - æ_H)/e))/sqrt(1 - e^2) + tan(θ_H) - tan(θ_C)) = 1775.44  # c
# 4) Определить угол максимальной дальности для заданных r_H и V_H
θ_Hmax := asin(sqrt((K - r_H*V_H^2)/(2*K - r_H*V_H^2))) = 0.474086  # рад
θ_Hmax = 27.1631°
# или
θ_Hmax := asin(sqrt((1 - æ_H)/(2 - æ_H))) = 0.474086  # рад
θ_Hmax = 27.1631°
# 5)  θ_Hопт– угол оптимальной траектории, т.е. угол наклона в начале пассивного участка, при котором заданная дальность L_C(2*ψ) будет получена при минимальной начальной скорости V_Hmin и найти V_Hmin.
# Известно что 2*ψ = φ_C = 1.30574рад  или  φ_C = 74.8131°
ψ := φ_C/2 = 0.652868
# рад
ψ = 37.4066°
θ_Hопт := 1/2*atan(sin(2*ψ)/(r_H/R_З - cos(2*ψ))) = 0.448862  # рад
θ_Hопт = 25.7179°
V_HI := sqrt(K/r_H) = 7.78848  # км/c
V_Hmin := V_HI*((1 - cos(2*ψ))/(r_H/R_З*cos(θ_Hопт)^2 - cos(θ_Hопт)*cos(θ_Hопт + 2*ψ)))^(1/2) = 6.68484  # км/c
# Ответ
# [Excel component]
    excel["B3:G3"] := [round(φ_S, 5), round(H_S, 5), round(V_S, 5), round(θ_S, 5), round(t_S, 5), round(L_S, 5)]
    excel["B4:G4"] := [round(φ_A, 5), round(H_A, 5), round(V_A, 5), round(θ_A, 5), round(t_A, 5), round(L_A, 5)]
    excel["B5:G5"] := [round(φ_C, 5), round(H_C, 5), round(V_C, 5), round(θ_C, 5), round(t_C, 5), round(L_C, 5)]
θ_Hmax = 0.474086  # рад
θ_Hmax = 27.1631°
θ_Hопт = 0.448862  # рад
θ_Hопт = 25.7179°
V_Hmin = 6.68484  # км/c
solve block
    # guess values
    ψ := 1
    # constraints
    r_H == R_З*(1 - cos(2*ψ) + æ_H*cos(θ_Hmax)*cos(θ_Hmax + 2*ψ))/(æ_H*cos(θ_Hmax)^2)
    # solver
    ψ := find(ψ)
end solve block
ψ = 0.652027  # рад
ψ = 37.3584°
L := R_З*(γ_Н + 2*ψ) = 8693.57  # км
