k := 1.4
R := 287
p_0∞ := 6*10^5  # Па
T_0∞ := 260  # K
M_∞ := 2.5
# Тогда для статического давления в точке 1 получаем
p_∞ := p_0∞*(1 + (k - 1)/2*M_∞^2)^(-k/(k - 1)) = 35116.6  # Па
# Температура набегающего потока
T_∞ := T_0∞*(1 + (k - 1)/2*M_∞^2)^-1 = 115.556  # К
# Найдём плотность потока в точке торможения. Из уравнения состояния идеального газа:
ρ_0∞ := p_0∞/(R*T_0∞) = 8.04074  # кг/м^3
# Тогда с использованием газодинамической функции для плотности получим
ρ_∞ := ρ_0∞*(1 + (k - 1)/2*M_∞^2)^(-1/(k - 1)) = 1.05886  # кг/м^3
# Местная скорость звука:
a_∞ := sqrt(k*R*T_∞) = 215.477  # м/с
# Тогда скорость набегающего потока
v_∞ := a_∞*M_∞ = 538.692  # м/с
# 1) Параметры в точке 1:
θ_c[1] := 90°
func(M) := (2*k/(k + 1)*M^2 - (k - 1)/(k + 1))^(-1/(k - 1))*((k + 1)*M^2/(2 + (k - 1)*M^2))^(k/(k - 1))
p_0[1] := p_0∞*func(M_∞) = 299409  # Па
i := 1, 1.001 .. 5
Mx := i
# [plot: func(Mx) vs Mx]
p_01/p_0∞
M_∞
# Тогда число Маха в точке 1:
M[1] := sqrt((2 + (k - 1)*M_∞^2)/(2*k*M_∞^2*sin(θ_c[1])^2) + 2*M_∞^2*cos(θ_c[1])^2/(2 + (k - 1)*M_∞^2*sin(θ_c[1])^2)) = 0.507093
# Тогда давление за скачком уплотнения можно найти, используя газодинамические функции:
p[1] := p_0[1]*(1 + (k - 1)/2*M[1]^2)^(-k/(k - 1)) = 251209  # Па
p[1] := p_∞*(2*k/(k + 1)*M_∞^2*sin(θ_c[1])^2 - (k - 1)/(k + 1)) = 250206  # Па
func2(M) := 2*k/(k + 1)*M^2*sin(θ_c[1])^2 - (k - 1)/(k + 1) - 1
# [plot: func2(Mx) vs Mx]
(p_1 - p_∞)/p_∞
M_∞
# Плотность потока в точке 1:
ρ[1] := ρ_∞*((k + 1)*M_∞^2*sin(θ_c[1])^2/(2 + (k - 1)*M_∞^2*sin(θ_c[1])^2)) = 3.52954  # кг/м^3
T_0[1] := T_0∞ = 260  # К
# Плотность заторможенного потока из уравнения состояния
ρ_0[1] := p_0[1]/(R*T_0[1]) = 4.01245  # кг/м^3
# Соответственно плотность потока в точке 1 за скачком уплотнения равна:
ρ[1] := ρ_0[1]*(1 + (k - 1)/2*M[1]^2)^(-1/(k - 1)) = 3.53965  # кг/м^3
# Температура потока в точке 1:
T[1] := T_0[1]*(1 + (k - 1)/2*M[1]^2)^-1 = 247.283  # К
# или
T[1] := T_∞*p[1]*ρ_∞/(p_∞*ρ[1]) = 246.295  # К
# Местная скорость звука за СУ в точке 1:
a[1] := sqrt(k*R*T[1]) = 314.581  # м/с
# Тогда скорость потока за СУ в точке 1:
v[1] := a[1]*M[1] = 159.522  # м/с
β[1] := 0
# 2) Параметры в точке 2 θ_c[2] := 58.65°. Аналогично точке 1, необходимо определить по изменению энтропии параметры торможения потока в этой точке.
p_0[2] := p_0∞*(2*k/(k + 1)*M_∞^2*sin(θ_c[2])^2 - (k - 1)/(k + 1))^(-1/(k - 1))*((k + 1)*M_∞^2*sin(θ_c[2])^2/(2 + (k - 1)*M_∞^2*sin(θ_c[2])^2))^(k/(k - 1)) = 394782
# Па
# Тогда число Маха в точке 2:
M[2] := sqrt((2 + (k - 1)*M_∞^2)/(2*k*M_∞^2*sin(θ_c[2])^2) + 2*M_∞^2*cos(θ_c[2])^2/(2 + (k - 1)*M_∞^2*sin(θ_c[2])^2)) = 1.11244
# Тогда давление за скачком уплотнения можно найти, используя газодинамические функции:
p[2] := p_0[2]*(1 + (k - 1)/2*M[2]^2)^(-k/(k - 1)) = 182058  # Па
p[2] := p_∞*(2*k/(k + 1)*M_∞^2*sin(θ_c[2])^2 - (k - 1)/(k + 1)) = 180897  # Па
# Плотность потока в точке 2:
ρ[2] := ρ_∞*((k + 1)*M_∞^2*sin(θ_c[2])^2/(2 + (k - 1)*M_∞^2*sin(θ_c[2])^2)) = 3.02979  # кг/м^3
T_0[2] := T_0∞ = 260  # К
# Плотность заторможенного потока из уравнения состояния
ρ_0[2] := p_0[2]/(R*T_0[2]) = 5.29056  # кг/м^3
# Соответственно плотность потока в точке 2 за скачком уплотнения равна:
ρ[2] := ρ_0[2]*(1 + (k - 1)/2*M[2]^2)^(-1/(k - 1)) = 3.04366  # кг/м^3
# Температура потока в точке 1:
T[2] := T_0[2]*(1 + (k - 1)/2*M[2]^2)^-1 = 208.416  # К
# или
T[2] := T_∞*p[2]*ρ_∞/(p_∞*ρ[2]) = 207.087  # К
# Местная скорость звука за СУ в точке 2:
a[2] := sqrt(k*R*T[2]) = 288.457  # м/с
# Тогда скорость потока за СУ в точке 1:
v[2] := a[2]*M[2] = 320.892  # м/с
# Найдём направление потока за СУ в точке 2:
β[2] := atan((cot(θ_c[2])*M_∞^2*sin(θ_c[2])^2 - 1)/(1 + ((k + 1)/2 - sin(θ_c[2])^2)*M_∞^2)) = 24.2659°
# 3) СУ в точке 3 можно также рассматривать как криволинейный отошедший скачок θ_c[3] := 47.57° .
p_0[3] := p_0∞*(2*k/(k + 1)*M_∞^2*sin(θ_c[3])^2 - (k - 1)/(k + 1))^(-1/(k - 1))*((k + 1)*M_∞^2*sin(θ_c[3])^2/(2 + (k - 1)*M_∞^2*sin(θ_c[3])^2))^(k/(k - 1)) = 475430
# Па
# Тогда число Маха в точке 3:
M[3] := sqrt((2 + (k - 1)*M_∞^2)/(2*k*M_∞^2*sin(θ_c[3])^2) + 2*M_∞^2*cos(θ_c[3])^2/(2 + (k - 1)*M_∞^2*sin(θ_c[3])^2)) = 1.47121
# Тогда давление за скачком уплотнения можно найти, используя газодинамические функции:
p[3] := p_0[3]*(1 + (k - 1)/2*M[3]^2)^(-k/(k - 1)) = 135001  # Па
p[3] := p_∞*(2*k/(k + 1)*M_∞^2*sin(θ_c[3])^2 - (k - 1)/(k + 1)) = 133647  # Па
# Плотность потока в точке 2:
ρ[3] := ρ_∞*((k + 1)*M_∞^2*sin(θ_c[3])^2/(2 + (k - 1)*M_∞^2*sin(θ_c[3])^2)) = 2.57376  # кг/м^3
T_0[3] := T_0∞ = 260  # К
# Плотность заторможенного потока из уравнения состояния
ρ_0[3] := p_0[3]/(R*T_0[3]) = 6.37134  # кг/м^3
# Соответственно плотность потока в точке 2 за скачком уплотнения равна:
ρ[3] := ρ_0[3]*(1 + (k - 1)/2*M[3]^2)^(-1/(k - 1)) = 2.59236  # кг/м^3
# Температура потока в точке 1:
T[3] := T_0[3]*(1 + (k - 1)/2*M[3]^2)^-1 = 181.451  # К
# или
T[3] := T_∞*p[3]*ρ_∞/(p_∞*ρ[3]) = 179.631  # К
# Местная скорость звука за СУ в точке 2:
a[3] := sqrt(k*R*T[3]) = 268.655  # м/с
# Тогда скорость потока за СУ в точке 1:
v[3] := a[3]*M[3] = 395.249  # м/с
# Найдём направление потока за СУ в точке 2:
β[3] := atan((cot(θ_c[3])*M_∞^2*sin(θ_c[3])^2 - 1)/(1 + ((k + 1)/2 - sin(θ_c[3])^2)*M_∞^2)) = 22.5192°
i := 1 .. 3
p[i] = [250206; 180897; 133647]
p_0[i] = [299409; 394782; 475430]
ρ[i] = [3.53965; 3.04366; 2.59236]
T[i] = [246.295; 207.087; 179.631]
a[i] = [314.581; 288.457; 268.655]
v[i] = [159.522; 320.892; 395.249]
β[i] = [0; 24.2659; 22.5192]°
